# SIGA-LAMMPS HPC smoke test — minimal Lennard-Jones melt.
#
# Purpose: validate the whole SLURM path (module load -> lmp -> log.lammps), not
# physics. Deliberately exercises the command-ordering rules the M primer and the
# X validator care about: units -> atom_style -> lattice -> region -> create_box
# -> create_atoms -> pair_style -> pair_coeff -> velocity -> fix -> run.
#
# Expected: runs to completion, "Total wall time" and a thermo table in log.lammps.

units           lj
atom_style      atomic
dimension       3
boundary        p p p

lattice         fcc 0.8442
region          box block 0 4 0 4 0 4
create_box      1 box
create_atoms    1 box
mass            1 1.0

pair_style      lj/cut 2.5
pair_coeff      1 1 1.0 1.0 2.5

velocity        all create 1.44 87287 loop geom
neighbor        0.3 bin
neigh_modify    delay 0 every 20 check no

fix             1 all nve
thermo          50
timestep        0.005
run             200
